*Heading
** Job name: Job-1 Model name: x3y8
** Generated by: AbaqusLink
*Preprint, echo=NO, model=Yes, history=NO, contact=NO
**
** Model definition
**
*Part, NAME=Part-1
*Node,	 nset=node-1
 1,	 0.0000,	 0.0000,	 -0.0000
 2,	 -0.0000,	 1.0245,	 -0.0000
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*Element,	 elset=STRUC,	 type=S3R
 1,	 50,	 51,	 58
 2,	 51,	 59,	 58
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** Section: Section-1
*Shell Section, elset=Struc, material=concrete
0.060000
*end Part
*Assembly, NAME = Assembly1
*Instance, NAME=PART-A, PART=Part-1
*END INSTANCE
*Nset, nset=nodes, instance=Part-A, generate
 1,	 3721,	 1
*Elset, elset=Struc, instance=Part-A, generate
 1,	 7200,	 1
*Elset, elset=_Surf-1_SNEG,  internal, instance=Part-A, generate
 1,	 7200,	 1
*Nset, nset=boundery, instance=Part-A
1, 2, 3, 13, 14, 15,
*Surface, type=ELEMENT, name=Surf-1
_Surf-1_SNEG, SNEG
*End Assembly
**
** MATERIALS
**
*Material, name=concrete
*Elastic
30000000000.000000,	 0.200000
**
 *DENSITY
 2500.000000
** ----------------------------------------------------------------
**
** STEP: Step-1
**
*Step, name=Step-1
*Static
0.1, 1., 1e-05, 0.1
**
**
** BOUNDARY CONDITIONS
**
** Name: BC-1
*Boundary
boundery, Encastre
**
** LOADS
**
** Name: Load-1   Type: Pressure
*DLOAD
Struc, GRAV, 9.81, 0.0, 0.0, -1.0
**
** OUTPUT REQUESTS
**
*Restart, write, frequency=0
**
** FIELD OUTPUT: F-Output-1
**
*Output, field
#*Node Output
#CF, RF, U
#*Element Output
#ALPHA, ALPHAN, CS11, CTSHR, MISES, MISESMAX, MISESONLY, PRESSONLY, PS, S, SF, SM, SSAVG, TRIAX, TSHR, VS
*Output, field, frequency=0
**
** HISTORY OUTPUT: H-Output-1
**
*Output, history, variable=PRESELECT
*NODE PRINT
U,
RF,
*EL PRINT
S,
*End Step
